OpenVSP model (file version 5), 6 components.
Geometry view with OpenVSP parameter names; values to 6 digits, angles in degrees, lengths in the model's unit.
Overall bounding box: X_Min=-0.0549405 X_Len=6.80766 Y_Min=-4.29255 Y_Len=8.58511 Z_Min=-0.987462 Z_Len=2.49939

Fuselage "FuselageGeom"
  location (X Y Z) 0 0 0, rotation 0 0 0
  bounding box size 6.62 0.999635 1.21344
  Design: Length=6.62
  cross sections:
    n   XLocPercent  YLocPercent  ZLocPercent  shape
    0   0            0            0            point
    1   0.0631793    0            0            circle Circle_Diameter=0.378
    2   0.0631793    0            0            ellipse Ellipse_Height=0.378 Ellipse_Width=0.451014
    3   0.0774235    0            0            edit curve Width=0.83277 Height=0.562162 AbsoluteFlag=0 SymType=1 cubic Bezier points (X Y): 0.478767 -0.00913173, 0.425342 -0.276996, 0.276142 -0.5, 0 -0.5, -0.276142 -0.5, -0.425342 -0.276996, -0.478767 -0.00913173, -0.478767 0.267011, -0.203425 0.40484, 0 0.417016, 0.203425 0.40484, 0.478767 0.267011, 0.478767 -0.00913173
    4   0.114169     0            -0.014       ellipse Ellipse_Height=0.725362 Ellipse_Width=0.999635
    5   0.145623     0            -0.0163043   ellipse Ellipse_Height=0.797297 Ellipse_Width=0.999635
    6   0.214958     0            -0.01635     ellipse Ellipse_Height=0.851351 Ellipse_Width=0.915847
    7   0.31321      0            -0.0173      ellipse Ellipse_Height=0.87 Ellipse_Width=0.789897
    8   0.345961     0            -0.00543478  ellipse Ellipse_Height=0.975368 Ellipse_Width=0.800892
    9   0.404146     0            0.0108696    ellipse Ellipse_Height=1.1 Ellipse_Width=0.800892
    10  0.466472     0            0.0108696    ellipse Ellipse_Height=1.12 Ellipse_Width=0.785625
    11  0.538895     0            0.0108696    ellipse Ellipse_Height=0.88 Ellipse_Width=0.741554
    12  0.716822     0            0            ellipse Ellipse_Height=0.693243 Ellipse_Width=0.481419
    13  0.836865     0            0            ellipse Ellipse_Height=0.510811 Ellipse_Width=0.298468
    14  1            0            0            point

Wing "WingGeom", child of "FuselageGeom"
  location (X Y Z) 1.52174 0 -0.326087, rotation 0 0 0
  symmetric about XZ
  bounding box size 2.64036 8.58511 0.475856
  totals: TotalSpan=8.39267 TotalProjectedSpan=8.38091 TotalChord=1.73835 TotalArea=12.4015 TotalAR=5.66382
  root: chord 2.64036, twist 0, NACA 4-series Camber=0 CamberLoc=0.2 ThickChord=0.18
  sections:
    n  Span      Root_Chord  Tip_Chord  Area     Sweep    Sweep_Location  Dihedral  Twist  Twist_Location  tip airfoil
    1  0.634224  2.64036     1.5836     1.33947  2.15909  0               -7.36364  0      0.25            as above
    2  3.56211   1.5836      1.14583    4.86127  2.15909  0               1.09091   0      0.25            as above

Wing "WingGeom"
  location (X Y Z) 5.21739 0 0.434783, rotation 0 0 0
  symmetric about XZ
  bounding box size 1.02408 3.26383 0.100058
  totals: TotalSpan=3.11459 TotalProjectedSpan=3.11459 TotalChord=0.864583 TotalArea=2.76308 TotalAR=3.51081
  root: chord 0.65625, twist 0, NACA 4-series Camber=0 CamberLoc=0.2 ThickChord=0.1
  sections:
    n  Span      Root_Chord  Tip_Chord  Area     Sweep    Sweep_Location  Dihedral  Twist  Twist_Location  tip airfoil
    1  0.296876  0.65625     1          0.24585  4.63636  0               0         0      0.25            as above
    2  1.26042   1           0.802083   1.13569  5.31818  0               0         0      0.25            as above

Wing "WingGeom", child of "WingGeom"
  location (X Y Z) 4.56522 0 0, rotation 90 0 0
  symmetric about XZ
  bounding box size 2.1875 0.218877 1.51193
  totals: TotalSpan=2.85417 TotalProjectedSpan=2.85417 TotalChord=1.42057 TotalArea=3.52339 TotalAR=2.31206
  root: chord 2.1875, twist 0, NACA 4-series Camber=0 CamberLoc=0.2 ThickChord=0.1
  sections:
    n  Span      Root_Chord  Tip_Chord  Area      Sweep    Sweep_Location  Dihedral  Twist  Twist_Location  tip airfoil
    1  0.395834  2.1875      1.48958    0.727758  57       0               0         0      0.25            as above
    2  1.03125   1.48958     0.515625   1.03394   38.0455  0               0         0      0.25            as above

Propeller "PropGeom", child of "WingGeom"
  location (X Y Z) 0.357143 0 0, rotation 0 0 0
  bounding box size 0.109333 1.71342 1.97494
  Design: Diameter=2.2 NumBlade=3 Beta34=20 UseBeta34Flag=1 Feather=0 Rotate=0 Precone=0 ReverseFlag=0 FoldAngle=0 PropMode=0 AF=147.573 CLi=0.538798 Chord=0.176198 Solidity=0.168256 ConstructXoC=0.5 FeatherAxisXoC=0.5 FeatherOffsetXoC=0
  cross sections:
    n  RadiusFrac  shape
    0  0.2         ellipse Ellipse_Height=0.044 Ellipse_Width=0.088
    1  0.4         NACA 16-series Chord=0.182875 IdealCl=0.7 ThickChord=0.144074
    2  1           NACA 16-series Chord=0.143 IdealCl=0.2 ThickChord=0.03
  Chord along r/R (cubic Bezier): 0.2: 0.08, 0.333333: 0.15, 0.466667: 0.2, 0.6: 0.2, 0.680332: 0.2, 0.760665: 0.203704, 0.840997: 0.203704, 0.893998: 0.203704, 0.946999: 0.2, 1: 0.13
  Twist along r/R (PCHIP): 0.2: 46.75, 0.75: 20, 1: 13
  Thick along r/R (cubic Bezier): 0.2: 0.5, 0.233333: 0.3, 0.266667: 0.225, 0.3: 0.2, 0.4: 0.125, 0.5: 0.115, 0.6: 0.1, 0.733333: 0.075, 0.866667: 0.055, 1: 0.03
  CLI along r/R (cubic Bezier): 0.2: 0, 0.266667: 0.7, 0.333333: 0.7, 0.4: 0.7, 0.466667: 0.7, 0.533333: 0.7, 0.6: 0.7, 0.733333: 0.7, 0.866667: 0.7, 1: 0.2

Mesh "MeshGeom"
  location (X Y Z) 0 0 0, rotation 0 0 0
  triangle mesh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
