OpenVSP model (file version 5), 5 components.
Geometry view with OpenVSP parameter names; values to 6 digits, angles in degrees, lengths in the model's unit.
Overall bounding box: X_Min=0 X_Len=35 Y_Min=-16.4144 Y_Len=32.8289 Z_Min=-2.25 Z_Len=10.25

Fuselage "FuselageGeom"
  location (X Y Z) 0 0 0, rotation 0 0 0
  bounding box size 35 4 4.5
  Design: Length=35
  cross sections:
    n  XLocPercent  YLocPercent  ZLocPercent  shape
    0  0            0            0            point
    1  0.25         0            0            ellipse Ellipse_Height=4.5 Ellipse_Width=4
    2  0.5          0            0            as above
    3  0.75         0            0            as above
    4  1            0            0            point

Wing "WingGeom", child of "FuselageGeom"
  location (X Y Z) 10.6865 0 1.31148, rotation 0 0 0
  symmetric about XZ
  bounding box size 10.5044 32.8289 1.71637
  totals: TotalSpan=33 TotalProjectedSpan=32.8289 TotalChord=3.75219 TotalArea=114.196 TotalAR=9.43763
  root: chord 6.85914, twist 0, NACA 4-series Camber=0 CamberLoc=0.2 ThickChord=0.1
  sections:
    n  Span  Root_Chord  Tip_Chord  Area     Sweep  Sweep_Location  Dihedral  Twist  Twist_Location  tip airfoil
    1  6.5   6.85914     3.39567    33.3281  29     0               0         0      0.25            as above
    2  10    3.39567     1.35827    23.7697  29     0               7.5       0      0.25            as above

Wing "WingGeom", child of "WingGeom"
  location (X Y Z) 29.7341 0 7.20955, rotation 0 0 0
  symmetric about XZ
  bounding box size 4.14247 11.7195 0.667838
  totals: TotalSpan=11.7535 TotalProjectedSpan=11.7195 TotalChord=2.21233 TotalArea=26.0027 TotalAR=5.28205
  root: chord 3.53974, twist 0, NACA 4-series Camber=0 CamberLoc=0.2 ThickChord=0.1
  sections:
    n  Span     Root_Chord  Tip_Chord  Area     Sweep  Sweep_Location  Dihedral  Twist  Twist_Location  tip airfoil
    1  5.87675  3.53974     0.884934   13.0013  29     0               4.35714   0      0.25            as above

Wing "WingGeom", child of "WingGeom"
  location (X Y Z) 10.4098 0 -1.06557, rotation 0 0 0
  symmetric about XZ
  bounding box size 4.55732 14.0954 2.66521
  totals: TotalSpan=15 TotalProjectedSpan=14.0954 TotalChord=1 TotalArea=15 TotalAR=13.2453
  root: chord 1.6, twist 0, NACA 4-series Camber=0 CamberLoc=0.2 ThickChord=0.1
  sections:
    n  Span  Root_Chord  Tip_Chord  Area  Sweep  Sweep_Location  Dihedral  Twist  Twist_Location  tip airfoil
    1  7.5   1.6         0.4        7.5   29     0               20        0      0.25            as above

Wing "WingGeom"
  location (X Y Z) 25.1742 0 0, rotation 90 0 0
  bounding box size 8.76004 0.644819 8
  totals: TotalSpan=8 TotalProjectedSpan=8 TotalChord=4.24584 TotalArea=33.9668 TotalAR=1.8842
  root: chord 6.44444, twist 0, NACA 4-series Camber=0 CamberLoc=0.2 ThickChord=0.1
  sections:
    n  Span  Root_Chord  Tip_Chord  Area     Sweep  Sweep_Location  Dihedral  Twist  Twist_Location  tip airfoil
    1  8     6.44444     2.04724    33.9668  40     0               0         0      0.25            as above
